/title, Piezoelectric Beam
/nopr

/PREP7 !Pre-processamento
!
!  Definicao dos parametros
!
!   - Geometria
!
Lbeam  =  100.0e-3        ! Comprimento da viga, m
Hbeam  =    0.5e-3        ! Espessura da viga, m
Hpzt   =    0.5e-3			  ! Espessura do PZT, m
Dpzt   =   10.0e-3			  ! distanci do PZT ao engaste, m
Lpzt   =   10.0e-3			  ! Comprimento do PZT, m
!
!   - Carregamento
!
V=100                           ! Voltagem doeletrodo, Volt
Uy=10.e-3                       ! Deflexao na ponta da viga, m
!
!   - Propriedades materiais do PVDF
!
E1=2.0e9                        ! Modulo de Elasticidade, N/m^2
NU12=0.29                       ! Coeficiente de Poisson
G12=0.775e9                     ! Modulo de cisalhamento, N/m^2
d31=2.2e-11                     ! Coeficientes de tensao piezoeletrica, C/N
d32=0.3e-11
d33=-3.0e-11
ept33=12                        ! Permissividade eletrica relativa com tensao constante

!
! Modelo de Elementos finitos
!

local,11                                   ! Sistema de coordenadas
rectng,Dpzt,Lpzt+Dpzt,-Hpzt,         0     ! Area para o PZT inferior
rectng,   0,    Lbeam,    0,     Hbeam     ! Area para a viga
rectng,Dpzt,Lpzt+Dpzt,Hbeam,Hbeam+Hpzt     ! Area para o PZT superior
aglue,all                                  ! Juncao das areas
esize,Hpzt                                 ! Tamanho do elemento utilizado


et,1,PLANE223,1001,,0           ! Elemento 2D piezoeletrico, Estado plano de tensao
tb,ANEL,1,,,1                   ! Matriz de compliance elastica
tbda,1,1/E1,-NU12/E1,-NU12/E1
tbda,7,1/E1,-NU12/E1
tbda,12,1/E1
tbda,16,1/G12
tb,PIEZ,1,,,1                   ! Matriz de tensao piezoeletrica
tbda,2,d31
tbda,5,d33
tbda,8,d32
tb,DPER,1,,,1                   ! Permissividade a tensao constante
tbdata,1,ept33,ept33
tblist,all                      ! Listagem das matrizes
!
!   - Propriedades materiais da viga
!
et,2,PLANE183			! Elemento estrutural 2D, Estado plano de tensao
mp,DENS,2,1e3     ! Densidade, kg/m3
mp,EX,2,1e9       ! Modulo de Elasticidade, N/m2
mp,NUXY,2,0.3     ! Coeficiente de Poisson


type,1            ! Atribui o elemento tipo 1 (piezoeletrico)
amesh,1,3         ! Gera a malha de area para os dois dominios de PZT
type,2            ! Atribui o elemento tipo 2 (estrutural)
amesh,4           ! Gera a malha para a viga

!
!   - Condicoes de contorno
!

!Engaste da viga
nsel,s,loc,x,0    ! Seleciona os nos
d,all,ux,0        ! Atribui deflexao nula na direcao x
d,all,uy,0        ! Atribui deflexao nula na direcao y
nsel,all          ! Reseleciona todos os nos

nsel,s,loc,y,Hbeam
nsel,r,loc,x,Dpzt,Dpzt+Lpzt
d,all,volt,0
nsel,all

/SOLU
antype,modal
modopt,QRDAMP,4
solve
fini
